// Examples:1b.glm
clock
{
  starttime '2000-01-01 00:00:00 UTC';
  stoptime '2001-01-01 00:00:00 UTC';
}
module residential;
module tape;
object house
{
  object recorder
  {
     property air_temperature;
     file temperature.csv;
  };
}
